*Heading
** Job name: SEN Model name: Cracked_plate
** Generated by: Abaqus/CAE 6.14-1
*Preprint, echo=NO, model=NO, history=NO, contact=NO
** ----------------------------------------------------------------
**
*Parameter
Xlc=0.005*2
Gc=0.010
Solution=0
** PARTS
**
*Node
1,          0.5,           0.
      2,        -0.25,           0.
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*User element, nodes=4, type=U2, properties=7, coordinates=2, var=40,
  INTEGRATION=4, TENSOR=PSTRAIN
1,2
1,4
*ELEMENT, TYPE=U2, ELSET=SOLID2
1, 292, 769, 652, 291
2, 660, 283, 284, 658
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*UEL PROPERTY, ELSET=SOLID2, MATERIAL=MATRIX
3500, 0.35, <Xlc>, <Gc>, 0, 0, <Solution>
*Element, type=CPE4, elset=Visualization
12026, 292, 769, 652, 291
12027, 660, 283, 284, 658
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*Nset, nset=Part-1-1_Set-matrix, generate
     1,  12165,      1
*Elset, elset=Part-1-1_Set-matrix, generate
     1,  12025,      1
** Section: Section-matrix
*Solid Section, elset=Visualization, material=Material-1
,
*System
*Nset, nset=Botside
   4,   5, 199, 200, 201, 202
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*Elset, elset=Botside
  10,  21,  31,  40,  49,  50
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*Nset, nset=Crack
     2,     3,   158,   159,   160,   161
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*Elset, elset=Crack
  110,  120,  130,  139,  353,  355
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*Nset, nset=Topside
   6,   7, 338, 339, 340, 341
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*Elset, elset=Topside
 6039, 6041, 6068, 6075, 6081, 6086
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**
** MATERIALS
**
*Material, name=Fibre
*Elastic
74000., 0.3
*Material, name=MATRIX
*Elastic
3500., 0.35
*Material, name=Material-1
*Depvar
     10,
1, S11, S11
2, S22, S22
3, S33, S33
4, S12, S12
5, E11, E11
6, E22, E22
7, E33, E33
8, E12, E12
9, PHI, PHI
10, H, H
*User Material, constants=0
** ----------------------------------------------------------------
**
** STEP: Step-1
**
*Step, name=Step-1, nlgeom=NO, inc=100000
*Static, direct
0.01, 1.,
*Solution Technique, type=QUASI-NEWTON, reform kernel=25
**
** BOUNDARY CONDITIONS
**
** Name: BC-1 Type: Displacement/Rotation
*Boundary
Botside, 1, 1
Botside, 2, 2
** Name: BC-2 Type: Displacement/Rotation
*Boundary
Topside, 2, 2, 0.015
**
** CONTROLS
**
*Controls, reset
*Controls, parameters=time incrementation
25000, 25000, 25000, 25000, 25000, , , , , ,
**
** OUTPUT REQUESTS
**
*Restart, write, frequency=0
**
** FIELD OUTPUT: F-Output-1
**
*Output, field, frequency=2
*Node Output
CF, RF, U
*Element Output, directions=YES
LE, PE, PEEQ, PEMAG, S, SDV
*Contact Output
CDISP, CSTRESS
**
** HISTORY OUTPUT: H-Output-2
**
*Output, history
*Node Output, nset=Topside
RF2, U2
**
** HISTORY OUTPUT: H-Output-1
**
*Output, history, variable=PRESELECT
*End Step
