*Heading
** Job name: SEN_5um_Ela Model name: Cracked_plate-5um
** Generated by: Abaqus/CAE 6.14-1
*Preprint, echo=NO, model=NO, history=NO, contact=NO
** ----------------------------------------------------------------
**
*Parameter
Xlc=0.005*2
Gc=0.010
T = 0.0001 # from study 'SEN_UMAT'
Freq=int(1/T/100)
Solution=0
** PART INSTANCE: Part-1-1
**
*Node
1,          0.5,           0.
      2,        -0.25,           0.
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*Element, type=CPE4, elset=Visualization-1
1, 9, 624, 636, 8
2, 639, 276, 277, 637
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*User element, nodes=4, type=U1, properties=4, coordinates=2, var=8
4
*ELEMENT, TYPE=U1, ELSET=SOLID1
11222, 9, 624, 636, 8
11223, 639, 276, 277, 637
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*UEL PROPERTY, ELSET=SOLID1
<Xlc>, <Gc>, 0, 0
*Nset, nset=Part-1-1_Set-matrix, generate
1,  11350,      1
*Elset, elset=Part-1-1_Set-matrix, generate
     1,  11221,      1
** Section: Section-matrix
*Solid Section, elset=Visualization-1, material=MATRIX
,
*System
*Nset, nset=Botside
   4,   5, 198, 199, 200, 201
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*Elset, elset=Botside
  10,  20,  30,  40,  49,  50
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*Nset, nset=Crack
     2,     3,   157,   158,   159,   160
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*Elset, elset=Crack
  112,  120,  130,  140,  352,  354
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*Nset, nset=Topside
   6,   7, 315, 316, 317, 318
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*Elset, elset=Topside
 5672, 5674, 5704, 5711, 5717, 5721
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**
** MATERIALS
*Material, name=MATRIX
*Depvar
     6,
1, S11, S11
2, S22, S22
3, S33, S33
4, S12, S12
5, PHI, PHI
6, PSI, PSI
*User Material, constants=2
3500.,   0.35
** ----------------------------------------------------------------
**
** STEP: Step-1
**
*Step, name=Step-1, nlgeom=NO, inc=100000
*Static, direct
<T>, 1.,
**
** BOUNDARY CONDITIONS
**
** Name: BC-1 Type: Displacement/Rotation
*Boundary
Botside, 1, 1
Botside, 2, 2
** Name: BC-2 Type: Displacement/Rotation
*Boundary
Topside, 2, 2, 0.01
**
** CONTROLS
**
*Controls, reset
*Controls, parameters=time incrementation
25000, 25000, 25000, 25000, 25000, , , , , ,
**
** OUTPUT REQUESTS
**
*Restart, write, frequency=0
**
** FIELD OUTPUT: F-Output-1
**
*Output, field, frequency=<Freq>
*Node Output
CF, RF, U
*Element Output, directions=YES
LE, PE, PEEQ, PEMAG, S, SDV
*Contact Output
CDISP, CSTRESS
**
** HISTORY OUTPUT: H-Output-2
**
*Output, history
*Node Output, nset=Topside
RF2, U2
**
** HISTORY OUTPUT: H-Output-1
**
*Output, history, variable=PRESELECT
*End Step
